units metal
boundary p p p
atom_style atomic

neighbor 2.0 bin
neigh_modify every 1 delay 0 check no

read_data _R_DATA_FILE_

pair_style deepmd _R_MODEL_FILES_ out_freq _R_PRINT_FREQ_ out_file _R_DEVI_OUT_
pair_coeff * *

timestep _R_TIMESTEP_

dump dcd all dcd _R_PRINT_FREQ_ _R_DCD_OUT_

thermo_style custom step time etotal ke pe temp press vol density cella cellb cellc cpuremain
thermo_modify flush yes
thermo _R_PRINT_FREQ_

group elec type 3
group water type 1 2

fix pl all plumed plumedfile plumed_he.dat outfile plumed.log #EB_plumed
fix 1 water nve
fix 2 water temp/csvr _R_TEMPERATURE_ _R_TEMPERATURE_ $(100.0*dt) _R_SEED_THER_
fix 3 water momentum 1 linear 1 1 1

#run _R_NUMBER_OF_STEPS_

#write_restart _R_RESTART_OUT_
